OpenVSP model (file version 4), 4 components.
Geometry view with OpenVSP parameter names; values to 6 digits, angles in degrees, lengths in the model's unit.
Overall bounding box: X_Min=0 X_Len=141.322 Y_Min=-56.3858 Y_Len=112.772 Z_Min=-7.00116 Z_Len=32.932

Fuselage "Fuselage"
  location (X Y Z) 0 0 0, rotation 0 0 0
  bounding box size 124.75 12.5529 13.3929
  Design: Length=124.75
  cross sections:
    n  XLocPercent  YLocPercent  ZLocPercent  shape
    0  0            0            -0.0133601   point
    1  0.003132     0            -0.0133603   ellipse Ellipse_Height=1.99048 Ellipse_Width=1.74647
    2  0.032317     0            -0.0120241   ellipse Ellipse_Height=5.77636 Ellipse_Width=5.33837
    3  0.052494     0            -0.00477145  ellipse Ellipse_Height=8.81836 Ellipse_Width=7.33097
    4  0.097087     0            -0.00171772  ellipse Ellipse_Height=11.8665 Ellipse_Width=10.4452
    5  0.148866     0            0            ellipse Ellipse_Height=13.17 Ellipse_Width=12.33
    6  0.71197      0            0            as above
    7  0.880931     0            0.012024     ellipse Ellipse_Height=8.57636 Ellipse_Width=7.54436
    8  1            0            0.0156504    point

Wing "Wing"
  location (X Y Z) 42.99 0 -4.75, rotation 0 0 0
  symmetric about XZ
  bounding box size 36.8355 112.772 8.21303
  totals: TotalSpan=113.33 TotalProjectedSpan=113.165 TotalChord=13.9948 TotalArea=1376.49 RelativeDihedralFlag=1
  root: chord 23.142, twist 0, NACA 63-series A=0 IdealCl=0 Theta=-2 ThickChord=0.1693
  sections:
    n  Span     Root_Chord  Tip_Chord  Area     Sweep  Sweep_Location  Dihedral  Twist  Twist_Location  tip airfoil
    1  16.7728  23.142      13.9113    310.744  25.72  0.25            5.69      0      0               NACA 63-series A=0 IdealCl=0 ThickChord=0.1016
    2  39.8922  13.9113     5.01485    377.502  25.72  0.25            0         -3     0               NACA 63-series A=0 IdealCl=0 ThickChord=0.0941

Wing "Htail"
  location (X Y Z) 111.99 0 2.75, rotation 0 0 0
  symmetric about XZ
  bounding box size 18.2746 46.1802 2.82616
  totals: TotalSpan=46.3566 TotalProjectedSpan=46.1802 TotalChord=7.38859 TotalArea=342.51
  root: chord 12.2836, twist 0, NACA 4-series Camber=0 CamberLoc=0.5 ThickChord=0.109
  sections:
    n  Span     Root_Chord  Tip_Chord  Area     Sweep  Sweep_Location  Dihedral  Twist  Twist_Location  tip airfoil
    1  23.1783  12.2836     2.49357    171.255  29.91  0.25            5         0      0               as above

Wing "Vtail"
  location (X Y Z) 106.671 0 3.09524, rotation 90 0 0
  bounding box size 34.651 2.14764 22.8356
  totals: TotalSpan=22.8356 TotalProjectedSpan=22.8356 TotalChord=11.9059 TotalArea=271.879
  root: chord 18.6614, twist 0, NACA 4-series Camber=0 CamberLoc=0.5 ThickChord=0.115
  sections:
    n  Span     Root_Chord  Tip_Chord  Area     Sweep  Sweep_Location  Dihedral  Twist  Twist_Location  tip airfoil
    1  22.8356  18.6614     5.15053    271.879  35     1               0         0      0               as above
