OpenVSP model (file version 4), 7 components.
Geometry view with OpenVSP parameter names; values to 6 digits, angles in degrees, lengths in the model's unit.
Overall bounding box: X_Min=7.70997 X_Len=211.095 Y_Min=-96.2195 Y_Len=192.439 Z_Min=-1.12688 Z_Len=57.3049

Wing "Wing"
  location (X Y Z) 75.2 0 14.75, rotation 0 0 0
  symmetric about XZ
  bounding box size 82.1008 192.439 14.4274
  totals: TotalSpan=193.348 TotalProjectedSpan=192.439 TotalChord=22.0781 TotalArea=4444.38
  root: chord 45.3, twist 6, airfoil file "CRM_Airfoil_1"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 ThickChord=0.1
  sections:
    n   Span     Root_Chord  Tip_Chord  Area     Sweep  Sweep_Location  Dihedral  Twist    Twist_Location  tip airfoil
    1   9.66733  45.3        38.9721    407.343  37     0               0.79048   4.4402   0               airfoil file "CRM_Airfoil_2"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 ThickChord=0.1
    2   4.8337   38.9721     36.1575    181.577  37     0               1.10144   3.6063   0               airfoil file "CRM_Airfoil_3"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 ThickChord=0.1
    3   4.8337   36.1575     33.3426    167.971  37     0               0.522045  3.0131   0               airfoil file "CRM_Airfoil_4"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 ThickChord=0.1
    4   4.83362  33.3426     30.5278    154.363  37     0               0.545827  2.2419   0               airfoil file "CRM_Airfoil_5"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 ThickChord=0.1
    5   4.8337   30.5278     27.713     140.759  37     0               0.964778  1.5252   0               airfoil file "CRM_Airfoil_6"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 ThickChord=0.1
    6   4.8337   27.713      24.8981    127.153  37     0               1.45888   0.9379   0               airfoil file "CRM_Airfoil_7"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 ThickChord=0.1
    7   1.93347  24.8981     23.7722    47.0511  37     0               1.76277   0.7635   0               airfoil file "CRM_Airfoil_8"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 ThickChord=0.1
    8   2.90016  23.7722     23.0656    67.9185  37.2   0               2.01019   0.4285   0               airfoil file "CRM_Airfoil_9"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 ThickChord=0.1
    9   4.8337   23.0656     21.8879    108.646  37.2   0               2.58872   -0.2621  0               airfoil file "CRM_Airfoil_10"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 ThickChord=0.1
    10  4.8337   21.8879     20.7103    102.954  37.2   0               3.44816   -0.6782  0               airfoil file "CRM_Airfoil_11"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 ThickChord=0.1
    11  4.8337   20.7103     19.5327    97.2613  37.2   0               4.29824   -0.9436  0               airfoil file "CRM_Airfoil_12"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 ThickChord=0.1
    12  4.8337   19.5327     18.355     91.5689  37.2   0               4.89462   -1.2067  0               airfoil file "CRM_Airfoil_13"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 ThickChord=0.1
    13  4.8337   18.355      17.1774    85.8764  37.2   0               5.53517   -1.4526  0               airfoil file "CRM_Airfoil_14"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 ThickChord=0.1
    14  4.8337   17.1774     15.9997    80.1841  37.2   0               6.41227   -1.635   0               airfoil file "CRM_Airfoil_15"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 ThickChord=0.1
    15  4.8337   15.9997     14.822     74.4917  37.2   0               7.18378   -1.8158  0               airfoil file "CRM_Airfoil_16"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 ThickChord=0.1
    16  4.8337   14.822      13.6444    68.7992  37.2   0               7.97624   -2.0301  0               airfoil file "CRM_Airfoil_17"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 ThickChord=0.1
    17  4.8337   13.6444     12.4668    63.1069  37.2   0               8.74214   -2.2772  0               airfoil file "CRM_Airfoil_18"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 ThickChord=0.1
    18  4.8337   12.4668     11.2891    57.4144  37.2   0               9.37877   -2.5773  0               airfoil file "CRM_Airfoil_19"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 ThickChord=0.1
    19  4.8337   11.2891     10.1115    51.722   37.2   0               9.8633    -3.1248  0               airfoil file "CRM_Airfoil_20"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 ThickChord=0.1
    20  4.8337   10.1115     8.93385    46.0297  37.2   0               9.94004   -3.75    0               airfoil file "CRM_Airfoil_21"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 ThickChord=0.1

Fuselage "Fuselage", child of "Wing"
  location (X Y Z) 7.70997 0 18.65, rotation 0 0 0
  bounding box size 205.88 20.5 20.3412
  Design: Length=205.88
  cross sections:
    n  XLocPercent  YLocPercent  ZLocPercent  shape
    0  0            0            -0.00930335  point
    1  0.0169982    0            -0.00850175  general fuselage BotStr=0.83 BotTanAngle=90 CornerRad=0 Height=6.8 LowStr=1.33091 MaxWidthLoc=0.154545 TopStr=0.83 TopTanAngle=73.2273 UpStr=0.83 Width=6.68
    2  0.0422659    0            -0.00388576  general fuselage BotStr=0.83 BotTanAngle=90 CornerRad=0 Height=13 LowStr=0.939955 MaxWidthLoc=-0.0818182 TopStr=0.83 TopTanAngle=90 UpStr=0.956591 Width=11.4
    3  0.163234     0            0            ellipse Ellipse_Height=20.3412 Ellipse_Width=20.5
    4  0.7054       0            0            as above
    5  1            0            0.0194326    rounded rectangle RoundRectXSec_Radius=0 RoundedRect_Height=4 RoundedRect_Width=0

Fuselage "GearPod", child of "Fuselage"
  location (X Y Z) 60 0 13.2874, rotation 0 0 0
  bounding box size 95 21.5467 15.3989
  Design: Length=95
  cross sections:
    n  XLocPercent  YLocPercent  ZLocPercent  shape
    0  0            0            0.03048      point
    1  0.263158     0            0.0131579    general fuselage BotStr=1.36823 BotTanAngle=90 CornerRad=0.00454545 Height=14 LowStr=0.956591 MaxWidthLoc=-0.272727 TopStr=1.6 TopTanAngle=90 UpStr=1.80692 Width=20.2
    2  0.639588     0            0.0131579    general fuselage BotStr=1.36823 BotTanAngle=90 CornerRad=0.00454545 Height=14 LowStr=0.956591 MaxWidthLoc=-0.272727 TopStr=1.5 TopTanAngle=90 UpStr=1.80692 Width=20.2
    3  1            0            0            point

Stack "Nacelle"
  location (X Y Z) 81.02 32.05 6.45, rotation 0 -2.5 1.7
  symmetric about XZ
  bounding box size 20.2163 80.5879 15.6849
  cross sections:
    n  XDelta    XRotate     YDelta      YRotate   ZDelta     ZRotate    shape
    0  0         0           0           0         0          0          circle Circle_Diameter=10.9
    1  3.19672   0           0           1.63636   0.07       0          circle Circle_Diameter=10.02
    2  16.38     0           0.13        2.3       -0.64      0.4        circle Circle_Diameter=9.5
    3  0         0           0           0         0          0          circle Circle_Diameter=9.62
    4  -19.5773  -0.0275241  0.00667435  -3.93627  -0.307159  -0.400946  circle Circle_Diameter=10.9

Fuselage "Pylon", child of "Nacelle"
  location (X Y Z) 83 31.5 12.2, rotation 6 0 2
  symmetric about XZ
  bounding box size 38.3865 67.4396 6.78831
  Design: Length=35.88
  cross sections:
    n  XLocPercent  YLocPercent  YRotate  ZLocPercent  shape
    0  0            0            0        0            point
    1  0.571349     0            -65      0.0105909    general fuselage BotStr=1.67195 BotTanAngle=90 CornerRad=0 Height=9 LowStr=1.21445 MaxWidthLoc=-0.227273 TopStr=1.56609 TopTanAngle=90 UpStr=0.83 Width=2.15
    2  1            0            40       0.0105909    rounded rectangle RoundRectXSec_Radius=0 RoundedRect_Height=5.5 RoundedRect_Width=0.15
    3  1            0            40       0.0106443    point

Wing "Vtail"
  location (X Y Z) 178 0 25, rotation 90 0 0
  bounding box size 35.2958 3.83814 31.178
  totals: TotalSpan=31.178 TotalProjectedSpan=31.178 TotalChord=17.3531 TotalArea=541.035
  root: chord 25.5718, twist 0, NACA 4-series Camber=0 CamberLoc=0.2 ThickChord=0.15
  sections:
    n  Span    Root_Chord  Tip_Chord  Area     Sweep  Sweep_Location  Dihedral  Twist  Twist_Location  tip airfoil
    1  31.178  25.5718     9.13438    541.035  40     0               0         0      0.25            NACA 4-series Camber=0 CamberLoc=0.2 ThickChord=0.1

Wing "Htail"
  location (X Y Z) 181.6 0 21.5, rotation 0 0 0
  symmetric about XZ
  bounding box size 37.205 69.9253 5.30583
  totals: TotalSpan=70.4833 TotalProjectedSpan=69.9351 TotalChord=16.6875 TotalArea=1012.8 RelativeDihedralFlag=1
  root: chord 21.5, twist 0, NACA 4-series Camber=0 CamberLoc=0.2 Invert=1 ThickChord=0.0935484
  sections:
    n  Span     Root_Chord  Tip_Chord  Area     Sweep  Sweep_Location  Dihedral   Twist  Twist_Location  tip airfoil
    1  5.99165  21.5        18.9       121.031  40.3   0               0.0702105  -2     0               as above
    2  29.25    18.9        7.45       385.369  40.15  0               7.85       0.8    0               NACA 4-series Camber=0.00174194 CamberLoc=0.658065 Invert=1 ThickChord=0.08
