OpenVSP model (file version 4), 6 components.
Geometry view with OpenVSP parameter names; values to 6 digits, angles in degrees, lengths in the model's unit.
Overall bounding box: X_Min=0 X_Len=75.4 Y_Min=-40.2635 Y_Len=80.5271 Z_Min=-5.50292 Z_Len=23.5957

Fuselage "Fuselage"
  location (X Y Z) 0 0 -1.3, rotation 0 0 0
  bounding box size 75.4 9.1 8.52445
  Design: Length=75.4
  cross sections:
    n  XLocPercent  YLocPercent  ZLocPercent  shape
    0  0            0            0            point
    1  0.0542235    0            0.00255319   ellipse Ellipse_Height=5.10718 Ellipse_Width=6.54767
    2  0.133693     0            0.0186371    ellipse Ellipse_Height=8.52304 Ellipse_Width=9.1
    3  0.652548     0            0.020073     ellipse Ellipse_Height=8.30933 Ellipse_Width=9.1
    4  0.972155     0            0.0431596    ellipse Ellipse_Height=1.77779 Ellipse_Width=1.19049
    5  0.986077     0            0.0442971    circle Circle_Diameter=1.1
    6  1            0            0.0442971    point

Fuselage "Fairing"
  location (X Y Z) 26.5 0 3.55, rotation 0 0 0
  bounding box size 23 8.40713 4.20337
  Design: Length=23
  cross sections:
    n  XLocPercent  YLocPercent  ZLocPercent  shape
    0  0            0            0            point
    1  0.25         0            -0.0130435   rounded rectangle RoundRectXSec_Radius=0.5 RoundedRect_Height=4.1786 RoundedRect_Width=8.39529
    2  0.4375       0            -0.0130435   rounded rectangle RoundRectXSec_Radius=0.5 RoundedRect_Height=3.5 RoundedRect_Width=8.3
    3  0.625        0            -0.0225213   rounded rectangle RoundRectXSec_Radius=0.5 RoundedRect_Height=2.53191 RoundedRect_Width=7
    4  1            0            -0.0515389   point

Fuselage "LandingGear"
  location (X Y Z) 22.9431 0 -2.8, rotation 0 0 0
  bounding box size 23 12.2674 5.40584
  Design: Length=23
  cross sections:
    n  XLocPercent  YLocPercent  ZLocPercent  shape
    0  0            0            0            point
    1  0.279572     0            0            ellipse Ellipse_Height=4.77187 Ellipse_Width=10.8929
    2  1            0            -0.0172164   ellipse Ellipse_Height=1.13777 Ellipse_Width=0

Wing "Wing"
  location (X Y Z) 28.6655 0 4.96134, rotation 0 0 0
  symmetric about XZ
  bounding box size 8.51176 80.5271 2.05602
  totals: TotalSpan=80.5896 TotalProjectedSpan=80.5271 TotalChord=7.48433 TotalArea=586.333
  root: chord 8.50823, twist 0, NACA 4-series Camber=0.03 CamberLoc=0.3 ThickChord=0.14
  sections:
    n  Span     Root_Chord  Tip_Chord  Area     Sweep    Sweep_Location  Dihedral  Twist  Twist_Location  tip airfoil
    1  15.7856  8.50823     8.38932    133.369  0        0               0         0      0.25            as above
    2  24.5092  8.38932     4.65046    159.797  5.54839  0               2.89474   0      0.25            as above

Wing "VT"
  location (X Y Z) 30.595 0 1.92941, rotation 90 0 0
  bounding box size 44.6932 2.01312 16.1634
  totals: TotalSpan=16.1634 TotalProjectedSpan=16.1634 TotalChord=15.3019 TotalArea=239.324
  root: chord 40.0831, twist 0, NACA 4-series Camber=0 CamberLoc=0.2 ThickChord=0.05
  sections:
    n  Span     Root_Chord  Tip_Chord  Area     Sweep    Sweep_Location  Dihedral  Twist  Twist_Location  tip airfoil
    1  4.99383  40.0831     13.8819    134.746  79.6253  0               0         0      0.25            as above
    2  5.28425  13.8819     8.71516    59.7043  52.8854  0               0         0      0.25            NACA 4-series Camber=0 CamberLoc=0.2 ThickChord=0.1
    3  5.88534  8.71516     6.53417    44.8737  33.5211  0               0         0      0.25            as above

Wing "HT"
  location (X Y Z) 67.2538 0 15.58, rotation 0 0 0
  symmetric about XZ
  bounding box size 6.50835 23.616 0.657378
  totals: TotalSpan=23.616 TotalProjectedSpan=23.616 TotalChord=5.24283 TotalArea=123.815
  root: chord 6.50835, twist 0, NACA 4-series Camber=0 CamberLoc=0.2 ThickChord=0.1
  sections:
    n  Span    Root_Chord  Tip_Chord  Area     Sweep    Sweep_Location  Dihedral  Twist  Twist_Location  tip airfoil
    1  11.808  6.50835     3.97732    61.9074  9.08065  0               0         0      0.25            as above
