OpenVSP model (file version 4), 7 components.
Geometry view with OpenVSP parameter names; values to 6 digits, angles in degrees, lengths in the model's unit.
Overall bounding box: X_Min=0 X_Len=137.595 Y_Min=-85.2913 Y_Len=170.583 Z_Min=-7.98373 Z_Len=28.7374

Fuselage "Fuselage"
  location (X Y Z) 0 0 0, rotation 0 0 0
  bounding box size 124.75 12.3917 13.9766
  Design: Length=124.75
  cross sections:
    n  XLocPercent  YLocPercent  ZLocPercent  shape
    0  0            0            -0.0224449   point
    1  0.034519     0            -0.0202653   circle Circle_Diameter=7.87084
    2  0.080322     0            -0.00570973  ellipse Ellipse_Height=12.6535 Ellipse_Width=11.5257
    3  0.17         0            0            ellipse Ellipse_Height=13.875 Ellipse_Width=12.3917
    4  0.683918     0            0            as above
    5  0.9999       0            0.0161828    ellipse Ellipse_Height=2.6186 Ellipse_Width=1
    6  1            0            0.016183     point

Wing "Gear Pod", child of "Fuselage"
  location (X Y Z) 35.8 0 -5.25, rotation 0 0 0
  symmetric about XZ
  bounding box size 36.4381 25.2828 5.46745
  totals: TotalSpan=25.4552 TotalProjectedSpan=25.2828 TotalChord=16.751 TotalArea=462.647 TotalAR=1.38165
  root: chord 36.4381, twist 0, NACA 4-series Camber=0 CamberLoc=0.2 ThickChord=0.15
  sections:
    n  Span    Root_Chord  Tip_Chord  Area     Sweep   Sweep_Location  Dihedral  Twist  Twist_Location  tip airfoil
    1  4       36.4381     25.7539    124.384  -49.55  1               -2        0      0               NACA 4-series Camber=0 CamberLoc=0.5 ThickChord=0.167333
    2  6.3076  25.7539     5.41177    98.2902  -49.55  1               7         0      0               NACA 4-series Camber=0 CamberLoc=0.5 ThickChord=0.2
    3  2.42    5.41177     1.73633    8.6492   -49.55  1               10        0      0               NACA 63-series A=0 IdealCl=0 ThickChord=0.181

Wing "Wing"
  location (X Y Z) 47.231 0 6.9375, rotation 0 0 0
  symmetric about XZ
  bounding box size 24.559 170.583 2.8328
  totals: TotalSpan=170.641 TotalProjectedSpan=170.583 TotalChord=8.82534 TotalArea=1478 TotalAR=19.6877
  root: chord 10.7287, twist 0, CST airfoil ContLERad=1 LowDegree=7 Theta=-2 ThickChord=0.1192 UpDegree=7 Au=[0.116633 0.129633 0.0962581 0.178225 0.100198 0.270487 0.0504155 0.312117] Al=[-0.116633 -0.0444823 -0.217855 -0.0532403 -0.180318 -0.116214 -0.0979911 0.208136]
  sections:
    n  Span     Root_Chord  Tip_Chord  Area     Sweep    Sweep_Location  Dihedral  Twist    Twist_Location  tip airfoil
    1  42.6603  10.7287     9.72046    436.182  11.5119  0.25            -1.5      1        0               CST airfoil ContLERad=1 LowDegree=7 ThickChord=0.1192 UpDegree=7 Au=[0.116633 0.129633 0.0962581 0.178225 0.100198 0.270487 0.0504155 0.312117] Al=[-0.116633 -0.0444823 -0.217855 -0.0532403 -0.180318 -0.116214 -0.0979911 0.208136]
    2  6.63623  9.72046     9.51378    63.8214  11.5119  0.25            -1.5      0.84444  0               CST airfoil ContLERad=1 LowDegree=7 ThickChord=0.1192 UpDegree=7 Au=[0.117452 0.126946 0.107896 0.156192 0.131792 0.25658 0.0628724 0.316064] Al=[-0.117452 -0.0368638 -0.21844 -0.0422431 -0.171153 -0.117923 -0.0801262 0.21693]
    3  36.024   9.51378     3.75492    238.996  14.0576  0.25            -1.5      0        0               as above

Wing "Htail"
  location (X Y Z) 122.905 0 20, rotation 0 0 0
  symmetric about XZ
  bounding box size 13.0887 38.4333 1.70007
  totals: TotalSpan=38.4861 TotalProjectedSpan=38.4333 TotalChord=7.69721 TotalArea=296.235 TotalAR=4.98631
  root: chord 11.4032, twist 0, NACA 4-series Camber=0 CamberLoc=0.5 ThickChord=0.09
  sections:
    n  Span    Root_Chord  Tip_Chord  Area     Sweep  Sweep_Location  Dihedral  Twist  Twist_Location  tip airfoil
    1  19.243  11.4032     3.99117    148.118  20.63  0.25            -3        0      0               as above

Wing "Vtail"
  location (X Y Z) 105.343 0 3.5, rotation 90 0 0
  bounding box size 32.2521 1.72592 17.2537
  totals: TotalSpan=17.2537 TotalProjectedSpan=17.2537 TotalChord=17.2537 TotalArea=297.69 TotalAR=1
  root: chord 17.2537, twist 0, NACA 4-series Camber=0 CamberLoc=0.5 ThickChord=0.1
  sections:
    n  Span     Root_Chord  Tip_Chord  Area    Sweep  Sweep_Location  Dihedral  Twist  Twist_Location  tip airfoil
    1  17.2537  17.2537     17.2537    297.69  41     0.25            0         0      0               as above

Wing "Jury"
  location (X Y Z) 58.7206 30.8179 0.731563, rotation 0 0 0
  symmetric about XZ
  bounding box size 1.62483 61.8502 5.44894
  totals: TotalSpan=10.8979 TotalProjectedSpan=1e-06 TotalChord=1.07042 TotalArea=11.6653 TotalAR=0
  root: chord 0.955833, twist 0, NACA 63-series A=0 IdealCl=0 ThickChord=0.181
  sections:
    n  Span     Root_Chord  Tip_Chord  Area     Sweep     Sweep_Location  Dihedral  Twist  Twist_Location  tip airfoil
    1  5.44894  0.955833    1.185      5.83264  -6.99948  0               90        0      0               as above

Wing "Strut"
  location (X Y Z) 55.573 12.6414 -4.2, rotation 0 0 0
  symmetric about XZ
  bounding box size 8.36936 97.9887 10.2842
  mass: Density=0.57 Shell_Flag=0 Mass_Area=1 Mass_Prior=1
  totals: TotalSpan=75.3871 TotalProjectedSpan=72.7059 TotalChord=3.21482 TotalArea=255.826 TotalAR=20.6631
  root: chord 1.73633, twist 0, NACA 63-series A=0 IdealCl=0 ThickChord=0.181
  sections:
    n  Span     Root_Chord  Tip_Chord  Area     Sweep    Sweep_Location  Dihedral  Twist  Twist_Location  tip airfoil
    1  3.76935  1.73633     3.92575    10.6712  8.38277  0.5             15.3265   0      0               as above
    2  9.42338  3.92575     3.92575    36.9938  8.38277  0.5             15.3265   0      0               as above
    3  5.65403  3.92575     1.81183    16.2202  8.38277  0.5             15.3265   0      0               as above
    4  5.65403  1.81183     3.92575    16.2202  8.38277  0.5             15.3265   0      0               as above
    5  9.42338  3.92575     3.92575    36.9938  8.38277  0.5             15.3265   0      0               as above
    6  3.76935  3.92575     1.81183    10.8135  8.38277  0.5             15.3265   0      0               as above

Parameter links (A drives B)
  Fuselage:XSec_3:Ellipse_Height -> Wing:XForm:Z_Location Scale=0.5
  Gear Pod:WingGeom:TotalProjectedSpan -> Strut:XForm:Y_Location Scale=0.5
  Strut:XSec_0:A -> Gear Pod:XSec_3:A Offset=0
  Strut:XSec_0:Chord -> Gear Pod:XSec_3:Chord Offset=0
  Strut:XSec_0:DeltaX -> Gear Pod:XSec_3:DeltaX Offset=0
  Strut:XSec_0:DeltaY -> Gear Pod:XSec_3:DeltaY Offset=0
  Strut:XSec_0:FitDegree -> Gear Pod:XSec_3:FitDegree Offset=0
  Strut:XSec_0:IdealCl -> Gear Pod:XSec_3:IdealCl Offset=0
  Strut:XSec_0:Invert -> Gear Pod:XSec_3:Invert Offset=0
  Strut:XSec_0:Scale -> Gear Pod:XSec_3:Scale Offset=0
  Strut:XSec_0:Series -> Gear Pod:XSec_3:Series Offset=0
  Strut:XSec_0:ShiftLE -> Gear Pod:XSec_3:ShiftLE Offset=0
  Strut:XSec_0:Theta -> Gear Pod:XSec_3:Theta Offset=0
  Gear Pod:XSec_3:ThickChord -> Strut:XSec_0:ThickChord Offset=0

Advanced link "Strut_Jury_Loc"
  input bw = Wing:WingGeom:TotalSpan
  input Zw = Wing:XForm:Z_Location
  input Zs = Strut:XForm:Z_Location
  input Ys = Strut:XForm:Y_Location
  input Dw = Wing:XSec_1:Dihedral
  input bw_sec1 = Wing:XSec_1:Span
  input theta = Wing:XSec_1:Sweep
  input Xw = Wing:XForm:X_Location
  input Xs = Strut:XForm:X_Location
  input cs_sec1 = Strut:XSec_1:Avg_Chord
  input cw_sec1 = Wing:XSec_1:Avg_Chord
  input strut_norm = Strut:Mass_Props:Density
  input bw_sec2 = Wing:XSec_2:Span
  input bw_sec3 = Wing:XSec_3:Span
  input theta2 = Wing:XSec_2:Sweep
  input theta3 = Wing:XSec_3:Sweep
  input Dw2 = Wing:XSec_2:Dihedral
  input Dw3 = Wing:XSec_3:Dihedral
  input rc_w1 = Wing:XSec_1:Root_Chord
  input tc_w1 = Wing:XSec_1:Tip_Chord
  input rc_w2 = Wing:XSec_2:Root_Chord
  input tc_w2 = Wing:XSec_2:Tip_Chord
  input rc_w3 = Wing:XSec_3:Root_Chord
  input tc_w3 = Wing:XSec_3:Tip_Chord
  input tip_strut_chord = Strut:XSec_6:Tip_Chord
  output Yj = Jury:XForm:Y_Location
  output bs = Strut:WingGeom:TotalSpan
  output D1 = Strut:XSec_1:Dihedral
  output D2 = Strut:XSec_2:Dihedral
  output D3 = Strut:XSec_3:Dihedral
  output D4 = Strut:XSec_4:Dihedral
  output D5 = Strut:XSec_5:Dihedral
  output D6 = Strut:XSec_6:Dihedral
  output b1 = Strut:XSec_1:Span
  output b2 = Strut:XSec_2:Span
  output b3 = Strut:XSec_3:Span
  output b4 = Strut:XSec_4:Span
  output b5 = Strut:XSec_5:Span
  output b6 = Strut:XSec_6:Span
  output bj = Jury:WingGeom:TotalSpan
  output Zj = Jury:XForm:Z_Location
  output Xj = Jury:XForm:X_Location
  output strut_sweep_1 = Strut:XSec_1:Sweep
  output strut_sweep_2 = Strut:XSec_2:Sweep
  output strut_sweep_3 = Strut:XSec_3:Sweep
  output strut_sweep_4 = Strut:XSec_4:Sweep
  output strut_sweep_5 = Strut:XSec_5:Sweep
  output strut_sweep_6 = Strut:XSec_6:Sweep
  output jury_sweep = Jury:XSec_1:Sweep
    double pi = 3.14159265;
    double tip_section_1 = bw_sec1;
    double tip_section_2 = bw_sec1+bw_sec2;
    double tip_section_3 = bw_sec1+bw_sec2+bw_sec3;

    double max_eta_section_1 = tip_section_1/(bw/2);
    double max_eta_section_2 = tip_section_2/(bw/2);
    double max_eta_section_3 = 1.0;

    // default
    double x_distance_wing = Xw + bw_sec1*sin(theta*pi/180);
    double calculated_chord = 0;
    // Check if strut eta is within section 1 domain
    if (strut_norm LeEeEeEeT= max_eta_section_1){

    // Calculate chord value and wing LE at location on section 1:
    calculated_chord = (strut_norm/max_eta_section_1)*rc_w1+(1-(strut_norm/max_eta_section_1))*tc_w1;
    // Now, use that value to place the x point where we want the strut to end up at:
    x_distance_wing = Xw + (strut_norm/max_eta_section_1)*bw_sec1*sin(theta*pi/180)+0.25*rc_w1+0.125*calculated_chord;

    }
    if (strut_norm LeEeEeEeT= max_eta_section_2 AmMmMmMmPAmMmMmMmP strut_norm GrRrRrRrT max_eta_section_1){
     calculated_chord = ((strut_norm-max_eta_section_1)/(max_eta_section_2-max_eta_section_1))*rc_w2+((strut_norm-max_eta_section_1)/(max_eta_section_2-max_eta_section_1))*tc_w2;
     x_distance_wing = Xw + bw_sec1*sin(theta*pi/180)+((strut_norm-max_eta_section_1)/(max_eta_section_2-max_eta_section_1))*(bw_sec2)*sin(theta2*pi/180)+0.25*rc_w1+0.125*calculated_chord;
    }

    if (strut_norm GrRrRrRrT max_eta_section_2){
     calculated_chord = ((strut_norm-max_eta_section_2)/(max_eta_section_3-max_eta_section_2))*rc_w3+((strut_norm-max_eta_section_2)/(max_eta_section_3-max_eta_section_2))*tc_w3;
     x_distance_wing = Xw + bw_sec1*sin(theta*pi/180)+bw_sec2*sin(theta2*pi/180)+((strut_norm-max_eta_section_2)/(max_eta_section_3-max_eta_section_2))*(bw_sec3)*sin(theta3*pi/180)+0.25*rc_w1+0.125*calculated_chord;
    }


    double x_distance = x_distance_wing - 0.5*tip_strut_chord - Xs;
    double y_distance = strut_norm*bw/2-Ys;
    double z_distance = Zw + strut_norm*(bw/2)*tan(Dw*pi/180) -Zs;
    bs = y_distance;
    double x2 = x_distance*x_distance;
    double y2 = y_distance*y_distance;
    double z2 = z_distance*z_distance;
    double total_distance = sqrt(x2 + y2 + z2);
    double dihedral = atan(z_distance/y_distance)*180/pi;
    double strut_sweep = atan(x_distance/y_distance)*180/pi;

    Xj = 0.4 + 0.5*total_distance*sin(strut_sweep*pi/180)+Xs;
    Yj = 0.5*total_distance*cos(dihedral*pi/180)+Ys;
    Zj = Zs + 0.5*total_distance*sin(dihedral*pi/180)-0.05;
    bj = (Zw + Yj*tan(Dw*pi/180)-Zj)*2+0.1;
    D1 = dihedral;
    D2 = dihedral;
    D3 = dihedral;
    D4 = dihedral;
    D5 = dihedral;
    D6 = dihedral;
    strut_sweep_1 = strut_sweep;
    strut_sweep_2 = strut_sweep;
    strut_sweep_3 = strut_sweep;
    strut_sweep_4 = strut_sweep;
    strut_sweep_5 = strut_sweep;
    strut_sweep_6 = strut_sweep;
    b1 = 0.1*total_distance;
    b2 = 0.25*total_distance;
    b3 = 0.15*total_distance;
    b4 = 0.15*total_distance;
    b5 = 0.25*total_distance;
    b6 = 0.1*total_distance;

    // Calculate jury sweep

    double Dab=bw_sec1*tan(theta*pi/180);
    double Dmn=Dab+tc_w1-rc_w1;
    double Dcg=bw_sec1-Yj;
    double Dfg=Dcg*Dmn/bw_sec1;
    double Dde=Yj*tan(theta*pi/180);
    double Def=Dab+tc_w1-Dde-Dfg;
    double Xe=Xw+Dde;
    double LE=0.15;
    double TE=0.76;
    double Xp=Xe+Def*(LE+(TE-LE)/2);
    double Zp=Zw+Yj*tan(Dw*pi/180);
    jury_sweep=atan((Xp-Xj)/(Zp-Zj))*180/pi;
